*Heading
 C:\Users\Florian\Desktop\testets\testets-VER.inp
*NODE
1, 5.5999999, 5.5999999, 9.39999962
2, 5.5999999, 5.5999999, 5.5999999
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*NSET,NSET=Nmaxy
11, 12, 15, 16,
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*NSET,NSET=Nminy
9, 10, 13, 14,
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*NSET,NSET=Nminz
10, 12, 13, 16,
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*NSET,NSET=Nmaxz
9, 11, 14, 15,
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*NSET,NSET=Nmaxx
13, 14, 15, 16,
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*NSET,NSET=Nminx
9, 10, 11, 12,
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******* E L E M E N T S *************
*ELEMENT, type=C3D4, ELSET=Volume2
1403, 180, 177, 208, 625
1404, 180, 208, 209, 625
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*ELEMENT, type=C3D4, ELSET=Volume3
1777, 68, 420, 412, 639
1778, 68, 412, 67, 639
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**
** MATERIALS
**
*Material, name=Matrix
*Elastic
10, 0.2
*Material, name=Embedded
*Elastic
55, 0.3
